File := READEXCEL("..\1. Выбор заряда\Расчеты в Терре для всех топлив\1. Топлива.xlsx", "Sheet1!A1:U9")
# [Excel component]
    excel["A1"] := File
# Исходные данные: | Ведомый - ПХА-4М - 1 | Ведущий - ПХН-2М - 2
p_k := 5 MPa
p_h := 0 MPa
ρ_1 := File[5, 6]*kg/m^3 = 1800 kg/m^3
ρ_2 := File[5, 9]*kg/m^3 = 2430 kg/m^3
J_P := 1500 kN*s
τ_р := 40 s
p_a := 0.03 MPa
u_11 := File[6, 6]*mm/s = 6.49 mm/s
u_12 := File[6, 9]*mm/s = 14.5 mm/s
v_1 := File[7, 6] = 0.24
v_2 := File[7, 9] = 0.19
D := 0.5 m
d := 0.02 m = 20 mm
X := 0.95
φ_c := 0.93
m_1 := ρ_1*u_12*(p_k/(98066.5 Pa))^v_2*π/4*(D^2 - d^2) = 10.7992 kg/s
m_2 := ρ_2*u_12*(p_k/(98066.5 Pa))^v_2*π/4*d^2 = 0.0233636 kg/s
m_sum := m_1 + m_2 = 10.8225 kg/s
arcsin2 := asin(u_11/u_12*(p_k/(98066.5 Pa))^(v_1 - v_2)) = 33.012 deg
g_1 := m_1/m_sum = 0.997841
g_2 := m_2/m_sum = 0.00215879
# Расчет по паре ПХА-4М - ПХН-2М:
Para := READEXCEL("..\1. Выбор заряда\Пара.xlsx", "Sheet1!A1:FM4")
# [Excel component]
    excel["A1"] := Para
R := Para[1, 15] J/(K*kg) = 376.087 J/(K*kg)
T_k := Para[1, 1] K = 3906.2 K
k := Para[1, 10] = 1.18683
u_1 := u_12 = 14.5 mm/s
# считаю по скорости ведущего
ν := v_2 = 0.19
λ_a := sqrt((k + 1)/(k - 1)*(1 - (p_a/p_k)^((k - 1)/k))) explicit, ALL → sqrt((1.18683 + 1)/(1.18683 - 1)*(1 - (0.03*MPa/(5*MPa))^((1.18683 - 1)/1.18683))) = 2.54434
f := (1 + λ_a^2)*(1 - (k - 1)/(k + 1)*λ_a^2)^(1/(k - 1)) = 0.100334
q := λ_a*(1 - (k - 1)/(k + 1)*λ_a^2)^(1/(k - 1))*((k + 1)/2)^(1/(k - 1)) = 0.0550913
ε := (1 - (k - 1)/(k + 1)*λ_a^2)^(1/(k - 1)) = 0.013425
w_a := sqrt(2*k/(k - 1)*X*R*T_k*(1 - (p_a/p_k)^((k - 1)/k))) = 3131.55 m/s
ρ_k := p_k/(R*T_k) = 3.40351 kg/m^3
# Не знаю зачем это написала
ρ_a := ε*ρ_k = 0.045692 kg/m^3
fλa := (p_a + ρ_a*w_a^2)/p_k = 0.0956169
A_k := (2/(k + 1))^(1/(k - 1))*sqrt(2*k/(k + 1)) explicit, ALL → (2/(1.18683 + 1))^(1/(1.18683 - 1))*sqrt(2*1.18683/(1.18683 + 1)) = 0.645961
J_yd := Para[3, 33] m/s*φ_c = 2732.67 m/s
Para[3, 33] m/s = 2938.36 m/s
P_sr := J_P/τ_р explicit, ALL → 1500*kN*s/(40*s) = 37500 N
m := P_sr/(2938.36 m/s) explicit, ALL → 37500*N/(2938.36 m/s) = 12.7622 kg/s  # - потребный расход
m_sum = 10.8225 kg/s  # - расход, который по расчету в самом начале
M_T := m_sum*τ_р explicit, ALL → 10.8225326996*kg/s*40*s = 432.901 kg
U := u_1*(p_k/(98066.5 Pa))^ν explicit, ALL → 14.5*mm/s*(5*MPa/(98066.5*Pa))^0.19 = 30.6044 mm/s
F_г := π/4*(D^2 - d^2)/(u_11/u_12*(p_k/(98066.5 Pa))^(v_1 - v_2)) + π*d^2/4 = 0.360134 m^2  # - площадь горения по геометрии
F_cr := m_sum*sqrt(X*R*T_k)/(φ_c*A_k*p_k) explicit, ALL → 10.8225326996*kg/s*sqrt(0.95*376.087*J/(kg*K)*3906.2*K)/(0.93*0.645961236423*5*MPa) = 0.0042565 m^2
d_cr := sqrt(4*F_cr/π) explicit, ALL → sqrt(4*0.00425650059035*m^2/π) = 73.6176 mm
R_cr := d_cr/2 = 36.8088 mm
F_a := F_cr/q explicit, ALL → 0.00425650059035*m^2/0.0550913434887 = 0.0772626 m^2
d_a := sqrt(4*F_a/π) = 313.646 mm
F_a/F_cr = 18.1517
R_a := d_a/2 = 156.823 mm
F_g1 := F_г
# Оставила этот кусок. Выгорание ведущего заряда полностью, а догорание остатков ведомого надо отдельно посчитать потом, но я пока не знаю как.
F_g :=
    for i ∈ 0 .. 30
        F_g[i] ← F_g1
    F_g
τ1 :=
    for i ∈ 0 .. 30
        τ1[i] ← 0 s
    τ1
τ :=
    for i ∈ 0 .. 30
        τ[i] ← τ1[i] + τ_р*i/30
    τ
e :=
    for i ∈ 0 .. 30
        e[i] ← τ[i]*U
    e
p_k :=
    for i ∈ 0 .. 30
        p_k[i] ← 5 MPa
    p_k
u1 :=
    for i ∈ 0 .. 30
        u1[i] ← u_11*(p_k[i]/(98066.5 Pa))^v_1
    u1
P :=
    for i ∈ 0 .. 30
        P[i] ← p_k[i]*φ_c*F_cr*f/q
    P
F_g = [
    0.360134; 0.360134; 0.360134; 0.360134; 0.360134; 0.360134; 0.360134; 0.360134; 0.360134; 0.360134
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] m^2
p_k = [
    5; 5; 5; 5; 5; 5; 5; 5; 5; 5
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] MPa
u1 = [
    16.6737; 16.6737; 16.6737; 16.6737; 16.6737; 16.6737; 16.6737; 16.6737; 16.6737; 16.6737
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] mm/s
e = [
    0; 0.0408058; 0.0816116; 0.122417; 0.163223; 0.204029; 0.244835; 0.285641; 0.326447; 0.367252
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] m
τ = [
    0; 1.33333; 2.66667; 4; 5.33333; 6.66667; 8; 9.33333; 10.6667; 12
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] s
P = [
    36.047; 36.047; 36.047; 36.047; 36.047; 36.047; 36.047; 36.047; 36.047; 36.047
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] kN
L := τ_р*U = 1.22417 m
# [Excel component]
    excel["A1"] := τ
    excel["C1"] := F_g
    excel["E1"] := u1*10^3
    excel["B1"] := e
    excel["D1"] := p_k/10^6
    excel["F1"] := P
# Расчет остатков
p_к := 5 MPa
α := 0.8
# - размеры эллипса
a := D/2 = 250 mm
b := α*a = 200 mm
F_г := π/4*(D^2 - d^2)/(u_11/u_12*(p_к/(98066.5 Pa))^(v_1 - v_2)) = 0.35982 m^2  # - площадь в начальный момент времени
ρ_1 := File[5, 6]*kg/m^3 = 1800 kg/m^3
# - считаю по ведомому топливу (1)
u_11 := File[6, 6]*mm/s = 6.49 mm/s
v_1 := File[7, 6] = 0.24
r_внут := [10; 28.5783; 47.8559; 68.0921; 89.5227; 112.5438; 137.9228; 167.6191; 0]*mm
R_внеш := [250; 250; 250; 250; 250; 250; 250; 248.1198; 0]*mm
l := [440.3218; 406.4166; 371.0328; 333.8895; 294.5539; 252.2989; 205.7163; 147.7579; 0]*mm
e := [0; 14.8647; 29.7293; 44.5940; 59.4586; 74.3233; 89.1879; 104.0526; 118.9172]*mm
F_г :=
    for i ∈ 0 .. last(r_внут)
        F_г[i] ← π*(R_внеш[i] + r_внут[i])*l[i]
    F_г
p_к :=
    for i ∈ 0 .. last(r_внут)
        p_к[i] ← (ρ_1*(u_11/98066.5^v_1)*F_г[i]*sqrt(X*R*T_k)/N/(φ_c*F_cr*A_k/m^2))^(1/(1 - v_1))
    p_к
u :=
    for i ∈ 0 .. last(r_внут)
        u[i] ← u_11*(p_к[i]/98066.5)^v_1
    u
u_sr :=
    for i ∈ 1 .. last(r_внут)
        u_sr[i] ← (u[i] + u[i - 1])/2
    u_sr
u_sr = [0; 16.6308; 16.5385; 16.3726; 16.1168; 15.742; 15.1929; 14.2761; 6.84329] mm/s
e_sr :=
    for i ∈ 1 .. last(r_внут)
        e_sr[i] ← (e[i] - e[i - 1])/2
    e_sr
t_p := [0; 0; 0; 0; 0; 0; 0; 0; 0]*s
e_sr = [0; 7.43235; 7.4323; 7.43235; 7.4323; 7.43235; 7.4323; 7.43235; 7.4323] mm
t_p :=
    for i ∈ 1 .. last(r_внут)
        t_p[i] ← t_p[i - 1] + (e[i] - e[i - 1])/((u[i] + u[i - 1])/2)
    t_p
F_cr = 0.0042565 m^2
f = 0.100334
φ_c = 0.93
q = 0.0550913
P_ост :=
    for i ∈ 1 .. last(r_внут)
        P_ост[i - 1] ← p_к[i]*Pa*φ_c*F_cr*f/q
    P_ост
F_г = [0.359661; 0.355687; 0.347191; 0.333661; 0.314184; 0.28736; 0.250706; 0.192984; 0] m^2
p_к = [4982904; 4910595; 4756835; 4514439; 4170927; 3708819; 3099271; 2196492; 0]
# Па
u = [16.66; 16.6017; 16.4754; 16.2699; 15.9638; 15.5202; 14.8656; 13.6866; 0] mm/s
t_p = [0; 0.893803; 1.79259; 2.70049; 3.62279; 4.56706; 5.54545; 6.58669; 8.75883] s
P_ост = [35.4024; 34.2939; 32.5464; 30.0699; 26.7383; 22.3439; 15.8354; 0] kN
# [Excel component]
    excel["A1"] := t_p
    excel["C1"] := F_г
    excel["E1"] := u*10^3
    excel["B1"] := e_sr
    excel["D1"] := p_к/10^6
    excel["F1"] := P_ост
# [plot: P (kN) vs τ]
# [plot: P_ост (kN) vs t_p]
# Расчет полного импульса тяги
# Занесла в excel значения тяги и времени, построила линию тренда и взяла уравнение полученной кривой. И дальше взяла интеграл
t2 :=
    for i ∈ 1 .. last(t_p)
        t2[i - 1] ← τ[last(τ)] + t_p[i]
    t2
# [Excel component]
    excel["A1:A31"] := τ
    excel["B1:B31"] := P
    excel["A32:A39"] := t2
    excel["B32:B39"] := P_ост
y(x) := -0.0038*x^5 + 0.3671*x^4 - 12.336*x^3 + 163.76*x^2 - 683.22*x + 36000
x_0 := 0
x_1 := t2[last(t2)]/s = 48.7588
I := integral(y(x), x = x_0 .. x_1)/10^3 = 1563.18  # H*c
# Время выхода на режим
W_св := 0.0083 m^3
β := sqrt(X*R/(m^2/(s^2*K))*T_k/K)/A_k explicit, ALL → sqrt(0.95*376.087*J/(kg*K)/(m^2/(s^2*K))*3906.2*K/K)/0.645961236423 = 1828.84
C_1 := W_св/m^3*sqrt(X)/(sqrt(R/(m^2/(s^2*K))*T_k/K)*F_cr/m^2*A_k*φ_c) = 0.00261022
# Плотность топлива беру по ведомому (1)
#
# Скорость по ведомому (1)
C_2 := ρ_1/(kg/m^3)*F_g[1]/m^2*u_11/(m/s*98066.5^v_1)*sqrt(X*R/(m^2/(s^2*K))*T_k/K)/(F_cr/m^2*A_k*φ_c) = 123213
t_вр := 1/(1 - v_1)*C_1*ln((C_2 - (2.1*10^6)^(1 - v_1))/(C_2 - (0.99*5*10^6)^(1 - v_1))) = 0.0148814
# [Excel component]
    excel["A1"] := τ
    excel["B1"] := p_k/10^6
    excel["C1"] := F_g
    excel["A32"] := t2
    excel["B31"] := p_к/10^6
    excel["C31"] := F_г
    excel["D1"] := u1*10^3
    excel["E1"] := P/10^3
    excel["D31"] := u*10^3
    excel["E32"] := P_ост/10^3
