p_кmax := 5 MPa
d_01 := 0 m
# - диаметры переднего и заднего полюсных отверстий
d_02 := 0.340 m
d := 0.513 m  # - наружный диаметр корпуса
k_з := 1.2
σ_вдоп := 2500 MPa  # - предел прочности на разрыв в тангенциальном направлении
α := 0.7
σ_в := σ_вдоп/k_з = 2083.33 MPa
d_011 := d_01/d = 0
d_021 := d_02/d = 0.662768
σ_вк := σ_в = 2083.33 MPa  # - допустимые напряжение при кольцевой намотке
σ_вс := σ_вк*α = 1458.33 MPa  # - при спиаральной намотке
# Углы намотки волокон у переднего  и заднего  днищ:
β_1 := acos(sqrt(1 - d_011^2)) = 0 deg
β_2 := acos(sqrt(1 - d_021^2)) = 41.5113 deg
# Толщины обечаек спиральной намотки в месте соединения цилиндрической обечайки с передним и задним днищами:
h_c1 := p_кmax*d/(2*σ_вс*cos(β_1)^2) = 0.879429 mm
h_c2 := p_кmax*d/(2*σ_вс*cos(β_2)^2) = 1.56834 mm
# Угол намотки волокон цилиндрической части оболочки:
β := (β_1 + β_2)/2 = 20.7557 deg
# Толщины спиральной и кольцевой намоток в центральной части обечайки:
h_c := h_c2*cos(β_1)/cos(β_2) = 2.0944 mm
h_к := α*h_c*(3*cos(β)^2 - 1) = 2.3798 mm
h_c1 := 1 mm
h_c := 3 mm
h_c2 := 2 mm
h_к := 3 mm
# Толщина центральной части цилиндрической обечайки
δ_ц := h_c + h_к = 6 mm
# Толщины обечаек в центральной части переднего и заднего днища
δ_1 := h_c1/d_011 explicit, ALL → 1*mm/0  # error: Невозможно вычислить выражение, поскольку оно делится на ноль.
δ_2 := h_c2/d_021 explicit, ALL → 2*mm/0.662768031189 = 3.01765 mm
d_1 := [0.0000001; 40; 85; 130; 180; 245; 300; d_02/mm; 390; 440; 480; 512.9]*mm
d_1/2 = [5e-8; 20; 42.5; 65; 90; 122.5; 150; 170; 195; 220; 240; 256.45] mm
d' :=
    for i ∈ 0 .. 11
        d'[i] ← d_1[i]/d
    d'
h_r1 :=
    for i ∈ 0 .. 11
        h_r1[i] ← h_c1*sqrt((1 - d_011^2)/(d'[i] - d_011^2))
    h_r1
h_r2 :=
    for i ∈ 0 .. 11
        h_r2[i] ← h_c2*sqrt((1 - d_021^2)/(d'[i] - d_021^2))
    h_r2
d' = [1.94932e-10; 0.0779727; 0.165692; 0.253411; 0.350877; 0.477583; 0.584795; 0.662768; 0.760234; 0.8577; 0.935673; 0.999805]
h_r1 = [71624; 3.5812; 2.45668; 1.98649; 1.68819; 1.44702; 1.30767; 1.22834; 1.1469; 1.07977; 1.0338; 1.0001] mm
h_r2 = [2.25969i; 2.49163i; 2.86336i; 3.47399i; 5.03759i; 7.6505; 3.9258; 3.16785; 2.64348; 2.31523; 2.12564; 2.00035] mm
# [Excel component]
    excel["A1"] := d_1*1000
    excel["C1"] := h_r1*1000
    excel["B1"] := d'
    excel["D1"] := h_r2*1000
